V_out21 := 21 V
V_inmax := 50 V
V_inmin := 26 V
V_out15 := 15 V
N_ps := 1
L := 51.84 μH
f_s := 100 kHz
T := 1/f_s = 1e-5 s
V_D := 0.6 V
D_max21 := (V_out21 + V_D)/(V_inmin + V_out21 + V_D) = 0.453782
D_max15 := (V_out15 + V_D)/(V_inmin + V_out21 + V_D) = 0.327731
# Diode krav - Krav til spænding og strøm samt effekttab, ses både med udgang på 5A og 2.5A
I_out21 := 2.5 A
I_out15 := 5 A
V_break := V_out21 + V_inmax = 71 V
I_D21 := I_out21/(1 - D_max21) = 4.57692 A
I_D15 := I_out15/(1 - D_max15) = 7.4375 A
P_D21 := I_D21*V_D = 2.74615 W
P_D15 := I_D15*V_D = 4.4625 W
# MOSFET krav (21V, 2.5A) - Spændingskrav samt tab med bestemt MOSFET for at give overblik (IRFS4620PbF)
V_ds := (V_inmax + N_ps*(V_out21 + V_D))*1.3 = 93.08 V
R_ds := 90 Ω*10^-3
t_r := 50 ns
t_f := 50 ns
I_ripple21 := V_inmin*D_max21/(L*f_s) = 2.27591 A
I_pk21 := V_out21*I_out21/(V_inmin*D_max21) + I_ripple21/2 = 5.58774 A
I_pkavg21 := I_out21/(1 - D_max21) = 4.57692 A
I_RMSp21 := sqrt(D_max21*I_pkavg21^2) = 3.08317 A
C_oss := 150*pF
P_cond := I_RMSp21^2*R_ds = 0.855533 W
P_sw := 1/2*I_pk21*(V_inmax + V_out21)*(t_r + t_f)/T + C_oss*(V_inmax + V_out21)^2*f_s/2 = 2.02146 W
# MOSFET krav (15V, 5A) samme MOSFET
V_ds := (V_inmax + N_ps*(V_out15 + V_D))*1.3 = 85.28 V
R_ds := 77.5 Ω*10^-3
t_r := 22.4 ns
t_f := 14.8 ns
I_pkavg15 := I_out15/(1 - D_max15) = 7.4375 A
I_RMSp15 := sqrt(D_max15*I_pkavg15^2) = 4.25781 A
I_RMSs15 := sqrt((1 - D_max15)*I_pkavg15^2) = 6.09816 A
I_ripple15 := V_inmin*D_max15/(L*f_s) = 1.64371 A
I_pk15 := V_out15*I_out15/(V_inmin*D_max15) + I_ripple15/2 = 9.62363 A
P_cond := I_RMSp15^2*R_ds = 1.40499 W
P_sw := 1/2*I_pk15*V_inmax*(t_r + t_f)/T = 0.894998 W
I_RMSp15 := sqrt((1 - D_max15)*I_pkavg15^2) = 6.09816 A
# Beregning af kernetab i transformator
A_0 := 63 mm^2
N := 18
V_e := 2440 mm^3
# Udregnet B felt
ΔB := L*I_ripple21/(N*A_0) = 104.042 T*10^-3
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B := ΔB/2 = 52.0208 T*10^-3
# Gå man ind på kurven omkring 50mT ved 100kHz, skærer omkring 15
P_V := 15 kW/m^3
P := P_V*V_e = 36.6 mW
# Dette giver ikke i nærheden af kernetabet vi fandt frem til ved pspice på omkring 350mT.. Kan det skyldes at kurven er for 100grader, eller er det en forkert måde at finde kernetabet på?
