# Transformator
N := 19
d_cu := 0.375 mm
# Omkreds af trådvejen for RM8
D := (9.95 mm + 16.9 mm)/2 = 13.425 mm
O := D*π = 4.21759 cm
# Beregner længden af kobbertråden
l := O*N = 80.1342 cm
# Beregner tværsnitareal af kobbertråden
A_cu := ((d_cu/2)^2*π)*3 = 0.33134 mm^2
# Beregning af DC modstand i tråden
ρ := 2.204*10^-8 Ω*m  # Ved 100 grader
R_dc := ρ*l/A_cu = 53.3035 Ω*10^-3
