V_dmin := 26 V
f_s := 100 kHz
V_dmaks := 100 V
V_omaks := 21 V
V_omin := 15 V
V_r := 0.6 V
D_max := 0.5
V_o' := V_r + V_omin = 15.6 V
V_o21' := V_r + V_omaks
# Turns ratio
n := V_dmin/V_o21'*D_max/(1 - D_max) = 1.2037
D_P24 := V_o21'*n/(V_dmaks + V_o21'*n) = 0.206349
D_15V := V_o'*n/(V_dmaks + V_o'*n) = 0.158092
D_S24 := 1 - D_P24 = 0.793651
D_S15 := 1 - D_15V = 0.841908
I_SCdc := 2.5 A
# Peak sekundær strøm ved boundary
I_SCpk := 2.5 A
I_SCdc := I_SCpk*D_S24/2 = 0.992063 A
I15_SCdc := 5 A
I_15SCpk := I15_SCdc*2/D_S15 = 11.8778 A
I_SCpk := I_SCdc*2/D_S24 = 2.5 A
Δi := I_SCpk  # Når det er DCM
# Induktans det kræves for at rampe op til ISCpk fra 0 ved boundary mode
T := 1/f_s = 10 μs
L := V_o21'*T*D_S24/Δi = 68.5714 μH
L_15 := V_o'*T*D_S15/Δi = 52.5351 μH
# Materiale til kernen. Står at ferrite er det bedste, når man kører DCM over 50kHz.
#
# De skriver også at, kan man ikke læse sig frem til det bruges BMAX=300mT
μ_0 = 1.25664e-6 kg*m/(s^2*A^2)
ΔB_max := 150 T*10^-3*2 = 0.3 T
A_e := 0.63 cm^2
I_e := 0.384 cm
μ_c := 120
N_s := 5
N_s := L_15*Δi/(ΔB_max*A_e) = 6.94908
N_s := L*Δi/(ΔB_max*A_e) = 9.07029
N_p := N_s*n = 10.9179
N_p := N_s*n = 10.9179
L_p := (N_p/N_s)^2*L = 99.3533 μH
gap := μ_0*N_p^2*A_e/L_p - I_e/μ_c = 0.00629839 cm
D_P24 := V_o'*n/(V_dmin + V_o'*n) = 0.419355
