V_dmax := 100 V
V_dmin := 26 V
V_outmin := 15 V
V_outmax := 21 V
# Beregner omsætningsforhold i transformator
N_ps := V_dmin/V_outmax = 1.2381
# Beregner den spænding Dideoden skal kunne holde til
V_diode := V_dmax/N_ps + V_outmax = 101.769 V
# Beregner induktansen i transformatoren
f_s := 100 kHz
P_in := 80 W
L_m := 1/2*V_dmin^2*(N_ps*V_outmax/(V_dmin + N_ps*V_outmax))^2/(1.2*P_in*f_s) = 8.80208 μH
L_m/N_ps^2 = 5.74219 μH
# Peak strømmen i MOSFET'en og dioden
I_pkMOS := P_in/(V_dmin*N_ps*V_outmax/(V_dmin + N_ps*V_outmax)) + 1/2*V_dmin/L_m*N_ps*V_outmax/(V_dmin + N_ps*V_outmax)/f_s = 13.5385 A
I_pkDIODE := N_ps*I_pkMOS = 16.7619 A
15 V/(100 V*4/5 + 15 V) = 0.157895
# Duty-cycle
D := N_ps*V_outmax/(V_dmin + N_ps*V_outmax) = 0.5
# RMS strømmen i MOSFET'en
I_RMSMOS := sqrt(1/3*D^3*(V_dmin/(L_m*f_s))^2 - D^2*I_pkMOS*V_dmin/(L_m*f_s) + D*I_pkMOS^2) = 5.29374 A
# Output kondensatoren
I_out := 5 A
V_outpkpk := 100 mV
ripple := V_outpkpk/V_outmax*100 = 0.47619
C_outmin := I_out*N_ps*V_outmin/(V_dmin + N_ps*V_outmin)/(ripple*V_outmin*f_s) = 2.91667 μF
A_l := L_m == 5^2*A_l solve, A_l → 0.352083333333*μH
