V_dmin := 26 V
V_dmaks := 100 V
f_s := 100 kHz
D_maks := 0.5
V_omin := 15 V
V_omaks := 21 V
PM := 15 V*5 A = 75 W
P := PM*1/0.94*(1 + 0) = 79.7872 W
# Herunder beregnes den kritiske output induktans
Lo_crit := V_omin^2*(1 - D_maks)^2/(2*P*f_s) = 3.525 μH
N_sN_p := V_omin/V_dmin*((1 - D_maks)/D_maks) = 0.576923
26*N_sN_p = 15
# Nu kan den primære induktans beregnes:
N_p := 26
N_s := 15
L_p := (N_p/N_s)^2*Lo_crit = 10.5907 μH
A_l := L_p == N_p^2*a solve, a → 0.0156666666667*μH
# Dutycycle findes på formlen
A_l = 0.0156667 μH
N_p^2*0.0156 = 10.5456
D := N_p/(N_s*V_dmin)*sqrt(2*63 W*Lo_crit*f_s) = 0.444297
# Primær maksimum peak og rms current
sqrt(2.5*L_p*(V_omaks + 0.5 V)*5 A*f_s)/V_dmin = 0.648877
I_ipk := N_s/N_p*sqrt(2*P/(Lo_crit*f_s)) = 12.275 A
I_irms := I_ipk*sqrt(D/3) = 4.72385 A
# Primær sense modstand, hvor 0,8V er strøm grænse minimum threshold for deres komponent
R_is := 0.8 V/I_ipk = 0.0651733 Ω
Lo_crit == V_omaks^2*(1 - D_maks)^2/(2*P*f)
f := V_omin^2*(1 - D_maks)^2/(2*P)/Lo_crit = 100 kHz
I_o := 5 A
# 15V output
V_omin = 15 V
PM = 75 W
# Sekundær maksimum discharge cycle:
D_x := 1/V_omin*sqrt(2*PM*Lo_crit*f_s) = 0.484768
# Sekundær maksimum peak og rms strøm
I_xpk := sqrt(2*PM/(Lo_crit*f_s)) = 20.6284 A
I_xrms := I_xpk*sqrt(D_x/3) = 8.29225 A
# Med en kondensator på 10uF på udgang vil det give følgende maks ripple strøm og spænding
I_cxrms := I_o*sqrt(D_x^2/6*((2 - D_x)/(6*D_x))^3 + (1 - D_x)) = 3.60822 A  # RMS
V_cx := 1/4*I_o/(10 μF*f_s)*(2 - D_x)^2 = 2.86991 V
5*0.05 = 0.25
