I_out := 5 A
f_s := 50 kHz
T := 1/f_s = 20 μs
V_inmin := 26 V
V_out := 15 V
V_inmax := 50 V
V_D := 0 V
η := 1
N_ps := 1
D_max := V_out/(V_inmin + V_out) = 0.365854
D_min := V_out/(V_inmax + V_out) = 0.230769
# Strøm i transformator
I_ripple := 0.6*V_out*I_out/(V_inmax*D_min) = 3.9 A
# Beregner induktans ud fra ripple strøm
L := V_inmax*D_min/(I_ripple*f_s) = 59.1716 μH
I_ripple26 := V_inmin*D_max/(L*f_s) = 3.21512 A
I_ripple50 := V_inmax*D_min/(L*f_s) = 3.9 A
I_pkavg26 := I_out/(1 - D_max) = 7.88462 A
I_pkavg50 := I_out/(1 - D_min) = 6.5 A
I_pk26 := I_pkavg26 + I_ripple26/2 = 9.49218 A
I_pk50 := I_pkavg50 + I_ripple50/2 = 8.45 A
I_RMSp26 := sqrt(D_max*I_pkavg26^2) = 4.76908 A
I_RMSp50 := sqrt(D_min*I_pkavg50^2) = 3.1225 A
I_RMSs26 := sqrt((1 - D_max)*I_pkavg26^2) = 6.27878 A
I_RMSs50 := sqrt((1 - D_min)*I_pkavg50^2) = 5.70088 A
# Beregner luft-gab i kernen
1/2*L*I_pk26^2 = 2.66572 J*10^-3
A_0 := 63 mm^2
B := 0.25 T
l_g := L*I_pk26^2*μ_0/(B^2*A_0) = 1701.51 μm
# Der tages udgangspunkt i en 3f3 kerne.
# lg rundes af til den nærmeste værdi i databladet, og den tilhørende AL-værdi noteres.
l_g := 488 μm
A_L := 160 H*10^-9
L_1 := l_g == L_1*I_pk26^2*μ_0/(B^2*A_0) solve, L_1 → 21.3259698844*μm*mm^2*T^2/(A^2*μ_0) = 16.9707 μH
I_ripple := V_inmin*D_max/(L_1*f_s) = 11.2102 A
N := sqrt(L_1/A_L) = 10.2989
N := 19
L_2 := N == sqrt(L_2/A_L) solve, L_2 → 361*H/6250000 = 57.76 μH
I_ripple := V_inmin*D_max/(L_2*f_s) = 3.2937 A
I_pkavg := I_out/(1 - D_max) = 7.88462 A
I_pk := I_pkavg + I_ripple/2 = 9.53146 A
I_RMSp := sqrt(D_max*I_pkavg^2) = 4.76908 A
I_RMSs := sqrt((1 - D_max)*I_pkavg^2) = 6.27878 A
# Beregning af minimumsværdi for udgangskondensator
V_ripple := 50 mV
C_out := I_out*D_max/(V_ripple*f_s) = 731.707 μF
R_ESR := V_ripple*(1 - D_max)/I_out = 6.34146 Ω*10^-3
# Diode krav
V_break := V_out + V_inmax = 65 V
V_D := 0.8 V
# MOSFET krav
V_L := V_inmax*0 = 0 V
V_ds := ((V_inmax + V_L) + 1*(V_out + V_D))*1.3 = 85.54 V
