I_out := 5 A
f_s := 100 kHz
T := 1/f_s = 10 μs
V_inmin := 26 V
V_out := 15 V
V_inmax := 100 V
V_D := 0 V
η := 1
N_ps := 1
D_max := (V_out + V_D)/(V_inmin + V_out + V_D) = 0.365854
D_min := (V_out + V_D)/(V_inmax + V_out + V_D) = 0.130435
# Strøm i transformator
I_ripple := 0.6*V_out*I_out/(V_inmax*D_min) = 3.45 A
I_pk := V_out*I_out/(V_inmin*D_max*η) + I_ripple/2 = 9.60962 A
I_RMSp := sqrt(D_max*((V_out*I_out/(V_inmin*D_max))^2 + I_ripple^2/3)) = 4.9189 A
# Beregner induktans ud fra ripple strøm
L := V_inmax*D_min/(I_ripple*f_s) = 37.8072 μH
# Beregner luft-gab i kernen
A_0 := 63 mm^2
B := 0.25 T
l_g := L*I_pk^2*μ_0/(B^2*A_0) = 1114.23 μm
# Der tages udgangspunkt i en 3f3 kerne.
# lg rundes op til den nærmeste værdi i databladet, og den tilhørende AL-værdi noteres.
l_g := 900 μm
A_L := 100 H*10^-9
L_1 := l_g == L_1*I_pk^2*μ_0/(B^2*A_0) solve, L_1 → 38.3752364687*mm^2*T^2*μm/(A^2*μ_0) = 30.538 μH
I_ripple := V_inmin*D_max/(L_1*f_s) = 3.11487 A
N := sqrt(L_1/A_L) = 17.4751
N := 18
L_2 := N == sqrt(L_2/A_L) solve, L_2 → 81*H/2500000 = 32.4 μH
I_ripple := V_inmin*D_max/(L_2*f_s) = 2.93586 A
I_pk := V_out*I_out/(V_inmin*D_max*η) + I_ripple/2 = 9.35255 A
I_pkavg := I_out/(1 - D_max) = 7.88462 A
I_RMSp := sqrt(D_max*I_pkavg^2) = 4.76908 A
I_RMSs := sqrt((1 - D_max)*I_pkavg^2) = 6.27878 A
# Beregning af kernetab i transformator
ΔB := L_2*I_ripple/(N*A_0) = 83.8818 T*10^-3
ΔB := ΔB = 83.8818 T*10^-3
P_V := 15 kW/m^3
V_e := 2440 mm^3
P := P_V*V_e = 36.6 mW
# Beregning af minimumsværdi for udgangskondensator
V_ripple := 50 mV
C_out := I_out*D_max/(V_ripple*f_s) = 365.854 μF
R_ESR := V_ripple*(1 - D_max)/I_out = 6.34146 Ω*10^-3
# Beregning af RHZP
f_RHZP := V_out/I_out*(1 - D_max)^2/(2*π*L_2/1^2*D_max) = 16.1982 kHz
# Diode krav
V_break := V_out + V_inmax = 115 V
V_D := 0.88 V
I_RMSs*V_D = 5.52533 W
V_D/I_RMSs = 0.140155 Ω
# MOSFET krav
V_L := V_inmax*0 = 0 V
V_ds := ((V_inmax + V_L) + 1*(V_out + V_D))*1.3 = 150.644 V
