I_out := 2.5 A
f_s := 100 kHz
T := 1/f_s = 10 μs
V_inmin := 26 V
V_out := 21 V
V_inmax := 100 V
V_D := 0 V
η := 1
N_ps := 1
D_max := V_out/(V_inmin + V_out) = 0.446809
D_min := V_out/(V_inmax + V_out) = 0.173554
# Strøm i transformator
I_ripple := 0.6*V_out*I_out/(V_inmax*D_min) = 1.815 A
I_pk := V_out*I_out/(V_inmin*D_max*η) + I_ripple/2 = 5.42673 A
I_RMSp := sqrt(D_max*((V_out*I_out/(V_inmin*D_max))^2 + I_ripple^2/3)) = 3.10097 A
# Beregner induktans ud fra ripple strøm
L := V_inmax*D_min/(I_ripple*f_s) = 95.6219 μH
# Beregner luft-gab i kernen
A_0 := 63 mm^2
B := 0.25 T
l_g := L*I_pk^2*μ_0/(B^2*A_0) = 898.717 μm
# Der tages udgangspunkt i en 3f3 kerne.
# lg rundes op til den nærmeste værdi i databladet, og den tilhørende AL-værdi noteres.
l_g := 488 μm
A_L := 160 H*10^-9
L_1 := l_g == L_1*I_pk^2*μ_0/(B^2*A_0) solve, L_1 → 65.2474941287*mm^2*T^2*μm/(A^2*μ_0) = 51.9223 μH
I_ripple := V_inmin*D_max/(L_1*f_s) = 2.23739 A
N := sqrt(L_1/A_L) = 18.0143
N := 18
L_2 := N == sqrt(L_2/A_L) solve, L_2 → 81*H/1562500 = 51.84 μH
I_ripple := V_inmin*D_max/(L_2*f_s) = 2.24094 A
I_pk := V_out*I_out/(V_inmin*D_max*η) + I_ripple/2 = 5.6397 A
I_pkavg := I_out/(1 - D_max) = 4.51923 A
I_RMSp := sqrt(D_max*I_pkavg^2) = 3.02082 A
I_RMSs := sqrt((1 - D_max)*I_pkavg^2) = 3.36126 A
# Beregning af kernetab i transformator
ΔB := L_2*I_ripple/(N*A_0) = 102.443 T*10^-3
ΔB := ΔB = 102.443 T*10^-3
P_V := 15 kW/m^3
V_e := 2440 mm^3
P := P_V*V_e = 36.6 mW
# Beregning af minimumsværdi for udgangskondensator
V_ripple := 50 mV
C_out := I_out*D_max/(V_ripple*f_s) = 223.404 μF
R_ESR := V_ripple*(1 - D_max)/I_out = 11.0638 Ω*10^-3
# Beregning af RHZP
f_RHZP := V_out/I_out*(1 - D_max)^2/(2*π*L_2/1^2*D_max) = 17.663 kHz
# Diode krav
V_break := V_out + V_inmax = 121 V
V_D := 0.88 V
P_D := I_RMSs*V_D = 2.95791 W
# MOSFET krav
V_L := V_inmax*0 = 0 V
V_ds := ((V_inmax + V_L) + N_ps*(V_out + V_D))*1.3 = 158.444 V
R_ds := 0.18 Ω
t_r := 51 ns
t_f := 36 ns
C_oss := 430*pF
P_cond := I_RMSp^2*R_ds = 1.64257 W
P_sw := 1/2*I_pk*V_inmax*(t_r + t_f)/T = 2.45327 W
