V_dmin := 26 V
f_s := 100 kHz
V_dmaks := 50 V
V_o := 21 V
V_omin := 15 V
T := 1/f_s = 10 μs
V_r := 0.6 V
D_max := 0.50
I_o := 2.5 A
V_o' := V_r + V_omin = 15.6 V
# Turns ratio
n := V_dmin/V_o*D_max/(1 - D_max) = 1.2381
n := 1
D_maks := V_o*n/(V_dmin + V_o*n) = 0.446809
D_min := V_o/(V_dmaks + V_o) = 0.295775
D_15V := V_o'*n/(V_dmaks + V_o'*n) = 0.237805
D_S15 := 1 - D_15V = 0.762195
PM := V_o*I_o = 52.5 W
2*PM/(V_o*(1 - D_maks)) = 9.03846 A
# Peak sekundær strøm ved boundary
I15_SCdc := 5 A
I_SCdc := I_SCpk*D_S24/2  # error: This variable is undefined. Check that the label is set correctly.
I_SCdc := 2.5 A
I_15SCpk := I15_SCdc*2/D_S15 = 13.12 A
I_SCpk := I_o*2/(1 - D_maks) = 9.03846 A
Δi := I_SCpk  # Når det er DCM
# Induktans det kræves for at rampe op til ISCpk fra 0 ved boundary mode
L := V_dmin*D_maks/(Δi*f_s) = 12.8529 μH
L_15 := V_o'*T*D_S15/Δi = 13.1552 μH
# Udgangspunkt i RM8 3F3 kernemateriale
# De skriver også at, kan man ikke læse sig frem til det bruges BMAX=300mT?
ΔB_max := 0.2*T
A_e := 0.63 cm^2
I_e := 0.384 cm
N_s := L*Δi/(ΔB_max*A_e) = 9.21986
N_s := 10
N_p := N_s*n = 10
N15_s := L_15*Δi/(ΔB_max*A_e) = 9.4367
L_p := (N_p/N_s)^2*L = 12.8529 μH
N15_p := N15_s*n = 9.4367
gap := L_p*I_SCpk^2*μ_0/(ΔB_max^2*A_e) = 0.0523599 cm
gap := μ_0*N15_p^2*A_e/L_15 - I_e/μ_c  # error: This variable is undefined. Check that the label is set correctly.
gap := 0.061 cm
# For RM8 med materialet 3F3 fås en air gap på 610um, Al=160nH og ue=78
Lp := gap == Lp*I_SCpk^2*μ_0/(ΔB_max^2*A_e) solve, Lp → 1.88166084201e-5*cm^3*T^2/(A^2*μ_0) = 14.9738 μH
D_P24 := V_o'*n/(V_dmin + V_o'*n) = 0.375
sqrt(Lp/(160 H*10^-9)) = 9.67399
D := N_p/(N_s*V_dmaks)*sqrt(2*52.5 W*L_p*f_s) = 0.23234
