I_o := 2.5 A
f_s := 100 kHz
T := 1/f_s = 10 μs
V_in := 26 V
I_pk := 10 A
L := V_in*T/2/I_pk = 13 μH
# Dette er en tilnærmelse af værdien for transformatorens induktor, hvor den vil operere på grænsen mellem DCM og CCM.
A_0 := 63 mm^2
B := 0.2 T
l_g := L*I_o^2*μ_0/(B^2*A_0) = 40.5166 μm
# Der tages udgangspunkt i en 3f3 kerne.
# lg rundes op til den nærmeste værdi i databladet, og den tilhørende AL-værdi noteres.
l_g := 180 μm
A_L := 400 H*10^-9
N := sqrt(L/A_L) = 5.70088
# Kontrol af duty-cycle ved DCM og CCM
V_in := 26 V
V_o := 21 V
R_l := 7 Ω
P_o := V_o^2/R_l = 63 W
N_p := 1
N_s := 1
L_dcm := 8 μH
D_dcm := N_p/(N_s*V_in)*sqrt(2*P_o*f_s*L_dcm) = 0.386151
D_ccm := V_o/(V_in*N_s/N_p + V_o) = 0.446809
N := 1
L_1 := 91.035 μH
