# Beregning af modstandsværdier til spændingsdeler i feedback
V_out := 21 V
V_FB := 2.5 V
I_FB1 := 1 mA
R_FB1 := (V_out - V_FB)/I_FB1 = 18.5 kΩ
R_FB1 := 18.7 kΩ
R_FB2 := V_FB/(R_FB/(R_FB1 + R_FB)) == V_out solve, R_FB → 2.52702702703*kΩ
R_FB21 := V_FB/I_FB1 = 2.5 kΩ
R_FB21 := 2.55 kΩ
R_FB22 := R_FB2 == (R_FB21^-1 + R_FB22^-1)^-1 solve, R_FB22 → 280.5*kΩ
R_FB22 := 280 kΩ
R_FB2 := (R_FB21^-1 + R_FB22^-1)^-1 = 2.52699 kΩ
V_FB := R_FB2/(R_FB1 + R_FB2)*V_out = 2.49996 V
# Beregning af RC komponenter til oscillator
f_osc := 200 kHz
C_T := 200*pF  # Foreslået 100pF til 1000pF
R_T := 1.5/(C_T*f_osc) = 37.5 kΩ  # Foreslået værdi mellem 10k og 200k ifølge datablad
R_T := 33.2 kΩ
f_s := f_osc/2 = 100 kHz
# Beregning af formodstand til MOSFET ud fra charge tid
t_ch := 50 ns
Q_gd := 29 nC
V_DD := 12 V
V_gs := 4 V
R_g := t_ch == Q_gd*R_g/(V_DD - V_gs) solve, R_g → 400*V*ns/(29*nC) = 13.7931 Ω
R_g := 13.7 Ω
Q_gd := 19 nC
t_ch := Q_gd*R_g/(V_DD - V_gs) = 32.5375 ns
# Beregning af current sense modstand og offset netværk
I_ppk := 5.65 A
V_CS := 900 mV
V_Rcs := 1000 mV
I_bias := 50 μA
V_ref := 5 V
R_CS := V_Rcs/I_ppk = 0.176991 Ω
P_Rcs := I_ppk^2*R_CS = 5.65 W
R_CSF := (V_CS - V_Rcs)/I_bias = -2 kΩ
R_P := (V_ref - V_CS)/I_bias = 82 kΩ
# Lavpas filter, for at fjerne spikes fra CS signal
t_r := 100 ns
C_lp := 100*pF
BW := 0.34/t_r = 3.4 MHz
R_lp := BW == 1/(2*π*R_lp*C_lp) solve, R_lp → 0.0004681027738/(pF*MHz) = 468.103 Ω
# Snubber netværk til MOSFET
L_m := 152 H*10^-9
f := 1/(40 ns) = 25 MHz
C_oss := 170*pF
C_trans := f == 1/(2*π*sqrt(L_m*C_trans)) solve, C_trans → 50000/(19*π^2*H*MHz^2) = 266.635 pF
X_Lm := 2*π*L_m*f = 23.8761 Ω
R_snubM := X_Lm = 23.8761 Ω
C_snubM := 2*C_trans = 533.269 pF
# Snubber netværk til diode
C_D := 80*pF
f := 1/(35 ns) = 28.5714 MHz
C_diode := f == 1/(2*π*sqrt(L_m*C_diode)) solve, C_diode → 204.142187437/(H*MHz^2) = 204.142 pF
R_snubD := 2*π*L_m*f = 27.287 Ω
P_snubM := C_snubM*(80 V)^2*f_s = 0.341292 W
C_snubD := 2*C_diode = 408.284 pF
P_snubD := C_snubD*(70 V)^2*f_s = 0.200059 W
# Beregning af 0-punkter
R_out := 8.4 Ω
D := 0.447
N_ps := 1
L_p := 51.84 μH
R_ESR := 15 Ω*10^-3
C_out := 150 μF
f_RHPZ := R_out*(1 - D)^2*N_ps^2/(2*π*L_p*D) = 17.6432 kHz
ω_RHPZ := 2*π*f_RHPZ
f_ESRz := 1/(2*π*R_ESR*C_out) = 70.7355 kHz
ω_ESRz := 2*π*f_ESRz
f_BW := f_RHPZ/4 = 4.4108 kHz
# Beregning af poler
τ_L := 2*L_p*f_s/(R_out*N_ps) = 1.23429
f_p1 := ((1 - D)^3/τ_L + 1 + D)/(2*π*R_out*C_out) = 200.082 Hz
ω_p1 := 2*π*f_p1
f_p2 := f_s/2 = 50 kHz
ω_p2 := 2*π*f_p2
# Beregning af kompensationsnetværk
C_FB := 1/(2*π*1 kΩ*f_RHPZ) = 9.02076 nF
f_cz := f_BW/10 = 441.08 Hz
C_z := 10 nF
R_z := 1/(2*π*f_cz*C_z) = 36.083 kΩ
R_5 := 18.7 kΩ
R_sot := 2.5 kΩ
A_ol := 19
A_ol := 10^(A_ol/20) = 8.91251
R_par := (R_5^-1 + R_sot^-1)^-1 = 2.20519 kΩ
R_8 := A_ol*R_par = 19.6538 kΩ
10 kΩ/R_par = 4.53476
f_zero := f_BW/10 = 441.08 Hz
C_9 := 1/(2*π*R_8*C_9) == f_zero solve, C_9 → 1.83593459048e-5/(Hz*kΩ) = 18.3593 nF
f_pole := f_BW*10 = 44.108 kHz
C_10 := f_pole == 1/(2*π*R_8*C_9*C_10/(C_9 + C_10)) solve, C_10 → 18.3593459048*nF/(100000*nF*kHz*kΩ - 1.0)
C_10 = 185.448 pF
30*10^-3/(2*π*100 kHz*56 μF) = 0.852616 Ω*10^-3
1/(2*π*100 kHz*56 μF) = 0.0284205 Ω
((1/(15 Ω*10^-3))*4)^-1 = 3.75 Ω*10^-3
# Open-loop gain:
M := 21 V*N_ps/(26 V) = 0.807692
A_CS := 1.65
R_CS := 0.167 Ω
G_o := R_out*N_ps/(R_CS*A_CS)*1/((1 - D)^2/τ_L + (2*M) + 1) = 10.6472
Q_P := 1
H_0(s) := G_o*(1 + s/ω_ESRz)*(1 - s/ω_RHPZ)/(1 + s/ω_p1)*1/(1 + s/(ω_p2*Q_P) + s^2/ω_p2^2)
# Output kondensator parasitter
C_out := 56 μF
f_res := 108 kHz
L_ESL := f_res == 1/(2*π*sqrt(C_out*L_cout)) solve, L_cout → 1/(2612736*π^2*kHz^2*μF) = 38.7797 H*10^-9
(L_ESL^-1*4)^-1 = 9.69493 H*10^-9
