# Beregning af duty-cycle ved:
V_d := 26 V
V_out := 21 V
D_1 := 0.4
v_oiOFF := -0.5 V
v_oiON := v_oiON*D_1 + v_oiOFF*(1 - D_1) == V_out solve, v_oiON → 53.25*V
N := v_oiON/V_d = 2.04808
V_L := N*V_d - V_out = 32.25 V
V_out/(V_d*(2/1)) = 0.403846
V_d := 100 V
V_out := 15 V
V_oion := V_out/0.5 + (0.5 V)*2 = 31 V
D_2 := V_oion/V_d == 2*N*D solve, D → 0.0756807511737*V/V = 0.0756808
# Beregning af spole-værdi
f_s := 50 kHz
ΔI_max := 2 A
L := V_d/(16*f_s*ΔI_max) = 62.5 μH
