P_out := 8.4 Ω*(2.5 A)^2 = 52.5 W
I_in := 50*V*I_in == P_out solve, I_in → 1.05*W/V = 1.05 A
f := 1 kHz
R := 10 kΩ
f == 1/(2*π*R*C) solve, C → 1/(20*π*kHz*kΩ) = 15.9155 nF
C := 50 nF
1/(2*π*R*C) = 318.31 Hz
((100 nF)^-1*2)^-1 = 50 nF
20.638 V/(1.501 A) = 13.7495 Ω
# Effektivitet ved 9ohm
V_in := 26.2 V
I_in := 2 A
V_out := 20.6 V
I_out := 2.3 A
P_in := V_in*I_in = 52.4 W
P_out := V_out*I_out = 47.38 W
η := P_out/P_in*100 = 90.4198
C_1 := 150*pF
L_m := 20 MHz == 1/(2*π*sqrt(L_1*C_1)) solve, L_1 → 1/(240000*π^2*MHz^2*pF) = 422.172 H*10^-9
f_osc := 20 MHz
2*π*L_m*f_osc = 53.0516 Ω
2*π*C_2 == f_osc
