# Transformator
N := 18
# Beregner en omkredsen af spoleformen, ud fra en gennemsnitlig diameter
D := (9.95 mm + 16.9 mm)/2 = 13.425 mm
O := D*π = 4.21759 cm
# Beregner længden a koppertråden
l := O*N = 75.9166 cm
# Ud fra dimensionerne fra databladet beregnes det maksimale areal der til rådighed til viklingerne
h := 8.6 mm
b := (16.9 mm - 9.95 mm)/2 = 3.475 mm
A := h*b = 29.885 mm^2
# Ud fra antal vindinger på både primær og sekundær siden, beregnes arelet der er til rådighed til trådtykkelsen. Dette ganges med en faktor ½, for at estimere et netto kobberareal når tråden er rund
A_cu := A/(N*2)*0.7 = 0.581097 mm^2
# Ud fra det areal, beregnes den tilhørende diameter
d := A_cu == (d/2)^2*π solve, d → [
    sqrt(1000000000000000000000)*sqrt(739875962669089791737)*mm/1000000000000000000000;
    -sqrt(1000000000000000000000)*sqrt(739875962669089791737)*mm/1000000000000000000000
] = [0.86016; -0.86016] mm
# Den positive diameter vælges
d := d[0] = 0.86016 mm
# Ud fra diameteren af tråden og højden fra databladet, beregnes antallet af lag viklingerne vil ligge i
lag := N/(h/d) = 1.80034
# Beregning af DC modstand i tråden
ρ := 1.68*10^-8 Ω*m
R_dc := ρ*l/A_cu = 21.9481 Ω*10^-3
# Beregning af AC modstand i tråden
f_s := 100 kHz
σ := 43.2*10^-6 S*m^2/m
# Først bestemmes indtrængningsdybden ved 100kHz
δ := 1 μm/sqrt(π*σ*μ_0*f_s) = 242.147 μm
# En Q-værdi beregnes og forholdet mellem Rac og Rdc aflæses på en "Eddy Current Losses" graf
Q := 0.83*d/δ = 2.94835
R_ac := R_ac/R_dc == 9 solve, R_ac → 0.197533001982*Ω
# Tab beregnes ud fra RMS-strømme i primær og sekundær viklinger
I_RMSp := 3.021 A
I_RMSs := 3.361 A
P_cup := I_RMSp^2*R_ac = 1.80277 W
P_cus := I_RMSs^2*R_ac = 2.2314 W
