# Transformator
N := 18
# Beregner en omkredsen af spoleformen, ud fra en gennemsnitlig diameter
D := (9.95 mm + 16.9 mm)/2 = 13.425 mm
O := D*π = 4.21759 cm
# Beregner længden a koppertråden
l := O*N = 75.9166 cm
# Ud fra dimensionerne fra databladet beregnes det maksimale areal der til rådighed til viklingerne
h := 8.6 mm
b := (16.9 mm - 9.95 mm)/2 = 3.475 mm
A := h*b = 29.885 mm^2
# Ud fra antal vindinger på både primær og sekundær siden, beregnes arelet der er til rådighed til trådtykkelsen. Dette ganges med en faktor ½, for at estimere et netto kobberareal når tråden er rund
A_cu := A/(N*2)*0.5 = 0.415069 mm^2
# Ud fra det areal, beregnes den tilhørende diameter
d := 0.751 mm
# Der vælges en mindre diameter og antal tråde i parallel beregnes
par := 8
d_1 := A_cu/((d_1/2)^2*π) == par solve, d_1 → [0.257022088175*mm; -0.257022088175*mm]
d_1 := d_1[0] = 0.257022 mm
# Ud fra diameteren af tråden og højden fra databladet, beregnes antallet af lag viklingerne vil ligge i
lag := N*par/(h/d_1) = 4.30363
# Beregning af DC modstand i tråden
ρ := 1.68*10^-8 Ω*m
R_dc := ρ*l/A_cu = 30.7274 Ω*10^-3
# Beregning af AC modstand i tråden
f_s := 100 kHz
σ := 43.2*10^-6 S*m^2/m
# Først bestemmes indtrængningsdybden ved 100kHz
δ := 1 μm/sqrt(π*σ*μ_0*f_s) = 242.147 μm
# En Q-værdi beregnes og forholdet mellem Rac og Rdc aflæses på en "Eddy Current Losses" graf
Q := 0.83*d_1/δ = 0.880989
R_ac := R_ac/R_dc == 1.7 solve, R_ac → 0.0522365049684*Ω
I_RMSp := 3.021 A
I_RMSs := 3.361 A
P_cup := I_RMSp^2*R_ac = 0.476733 W
P_cus := I_RMSs^2*R_ac = 0.59008 W
