f_s := 150 kHz
V_inmax := 100 V
V_outmin := 15 V
P_out := 75 W
D_max := 0.5
V_D := 0.5 V
R_th := 57 K/W
ΔT := 40 K
V_e := 1850 mm^3
A_min := 39.5 mm^2
# Vindingsforhold:
V_trans := V_outmin/D_max = 30 V
N := V_inmax/V_trans = 3.33333
N := 0.577
N := 1/N
# Beregning af Delta B-felt:
P_e := ΔT/R_th = 0.701754 W
P_e := P_e/2 = 0.350877 W
P_V := P_e/V_e = 189.663 kW/m^3
ΔB := 190 T*10^-3  # Delta-B aflæses til ca 190mT, i tabskurven
# Beregning af antal viklinger
N_p := V_inmax*D_max/(2*ΔB*A_min*f_s) = 22.2074
N_s := N_p/N = 12.8137
N_s := 4  # Rundes op til 4
# Ny Np beregnes:
N_p := N_s*N = 6.93241
N_p := 13  # Rundes ned til 13
# Den korrigede B bliver:
B := V_inmax*D_max/(N_p*A_min*f_s) = 649.14 T*10^-3
N_p := 9.38
L_p := 10.591 μH
A_e := 63 mm^2
l_e := 38.4 mm
μ_c := 78
l_g := μ_0*N_p^2*A_e/L_p - l_e/μ_c = 0.165379 mm
