I_out := 2.5 A
f_s := 100 kHz
T := 1/f_s = 10 μs
V_inmin := 26 V
V_out := 21 V
V_inmax := 100 V
V_D := 0 V
D_max := V_out/(V_inmin + V_out) = 0.446809
D_min := V_out/(V_inmax + V_out) = 0.173554
# Beregner ønsket maks strøm ripple, og ud fra det, den tilhørende induktans
I_ripple := 0.6*V_out*I_out/(V_inmax*D_min) = 1.815 A
L := V_inmax*D_min/(I_ripple*f_s) = 95.6219 μH
# Beregner luft-gab i kernen
A_0 := 63 mm^2
B := 0.2 T
l_g := L*I_out^2*μ_0/(B^2*A_0) = 298.021 μm
# Der tages udgangspunkt i en 3f3 kerne.
# lg rundes op til den nærmeste værdi i databladet, og den tilhørende AL-værdi noteres.
l_g := 270 μm
A_L := 315 H*10^-9
L_1 := l_g == L_1*I_out^2*μ_0/(B^2*A_0) solve, L_1 → 108.864*mm^2*T^2*μm/(A^2*μ_0) = 86.6312 μH
I_ripple := V_inmin*D_max/(L_1*f_s) = 1.34097 A
N := sqrt(L_1/A_L) = 16.5837
N := 17
L_2 := N == sqrt(L_2/A_L) solve, L_2 → 18207*H/200000000 = 91.035 μH
I_ripple := V_inmin*D_max/(L_2*f_s) = 1.2761 A
# Strøm i transformator
η := 1
I_pk := V_out*I_out/(V_inmin*D_max*η) + I_ripple/2 = 5.15728 A
I_RMS := sqrt(D_max*((V_out*I_out/(V_inmin*D_max))^2 + I_ripple^2/3)) = 3.0607 A
# Beregning af minimumsværdi for udgangskondensator
V_ripple := 50 mV
C_out := I_out*D_max/(V_ripple*f_s) = 223.404 μF
R_ESR := V_ripple*(1 - D_max)/I_out = 11.0638 Ω*10^-3
# Beregning af RHZP
f_RHZP := V_out/I_out*(1 - D_max)^2/(2*π*L_2/1^2*D_max) = 10.0582 kHz
# Diode krav
V_break := V_out + V_inmax = 121 V
# MOSFET krav
V_L := V_inmax*0 = 0 V
V_ds := ((V_inmax + V_L) + 1*(V_out + V_D))*1.3 = 157.3 V
